ORIGIN := 0
# Стоимость комплектующих:
parts_price := [10, 1, 9.5, 2.34, 0.45, 3.31, 37.92, 14.33, 1.49, 7.92, 5.49, 1.22, 2.39, 0.61, 7.32, 9.4, 8.6, 4.74, 2.40, 0.53, 6.89, 3.84, 105.89, 23.65, 14.56]
delivery_price := 20
parts_price_sum := sum(parts_price[0, i], i = 0 .. 24) = 285.79
Р_к := parts_price_sum + delivery_price = 305.79
# Расчет ЗП:
З_о := 35.87
Н_д := 50
Н_н := 150
Num := 500
З_д := З_о*Н_д/100 = 17.935
Р_н := З_о*Н_н/100 = 53.805
Н_соц := 35
Р_соц := (З_о + З_д)*Н_соц/100 = 18.8317
Р_м := Р_к
Н_ком := 5
С_пр := Р_м + З_о + З_д + Р_соц + Р_н = 432.232
Р_ком := С_пр*Н_ком/100 = 21.6116
С_п := С_пр + Р_ком = 453.843
Н_ре := 14
П_ед := С_п*Н_ре/100 = 63.5381
Ц_отп := С_п + П_ед = 517.381
# Расчет чистой прибыли:
Н_п := 18
Num_1 := Num = 500
Num_2 := Num_1*1.2 = 600
Num_3 := Num_2*1.2 = 720
Num_4 := Num_3*1.2 = 864
П_ч1 := Num_1*П_ед*(1 - Н_п/100) = 26050.6
П_ч2 := Num_2*П_ед*(1 - Н_п/100) = 31260.7
П_ч3 := Num_3*П_ед*(1 - Н_п/100) = 37512.9
П_ч4 := Num_4*П_ед*(1 - Н_п/100) = 45015.4
# Расчет инвестиций в производство нового изделия:
З_о2 := 1895.38
Р_м2 := 49.95
З_д2 := З_о2*Н_д/100 = 947.69
Р_соц2 := (З_о2 + З_д2)*Н_соц/100 = 995.075
Р_н2 := З_о2*Н_н/100 = 2843.07
С_р := Р_м2 + З_о2 + З_д2 + Р_соц2 + Р_н2 = 6731.16
П_п := С_р*Н_ре/100 = 942.363
И_раз := С_р = 6731.16
П_к := Р_к*Num = 152895
П_м := 0
И_об := Н_ре/100*(П_к + П_м) = 21405.3
И := И_раз + И_об = 28136.5
# Расчет показателей экономической эффективности проекта:
Е_н := 0.11
t_р := 1
a(t) := 1/(1 + Е_н)^(t - t_р)
a_t1 := a(1) = 1
a_t2 := a(2) = 0.900901
a_t3 := a(3) = 0.811622
a_t4 := a(4) = 0.731191
П_чt1 := П_ч1*a_t1 = 26050.6
П_чt2 := П_ч2*a_t2 = 28162.8
П_чt3 := П_ч3*a_t3 = 30446.3
П_чt4 := П_ч4*a_t4 = 32914.9
Прир_1 := Num = 500
Прир_2 := Прир_1*0.2 = 100
Прир_3 := Прир_2*1.2 = 120
Прир_4 := Прир_3*1.2 = 144
И_об1 := Прир_1*Н_ре/100*Р_к = 21405.3
И_об2 := Прир_2*Н_ре/100*Р_к = 4281.06
И_об3 := Прир_3*Н_ре/100*Р_к = 5137.27
И_об4 := Прир_4*Н_ре/100*Р_к = 6164.73
И_1 := И_раз + И_об1 = 28136.5
И_2 := И_об2 = 4281.06
И_3 := И_об3 = 5137.27
И_4 := И_об4 = 6164.73
И_t1 := И_1*a_t1 = 28136.5
И_t2 := И_2*a_t2 = 3856.81
И_t3 := И_3*a_t3 = 4169.53
И_t4 := И_4*a_t4 = 4507.59
ЧДД_t1 := a_t1*(П_ч1 - И_t1) = -2085.86
ЧДД_t2 := a_t2*(П_ч2 - И_t2) = 24688.2
ЧДД_t3 := a_t3*(П_ч3 - И_t3) = 27062.2
ЧДД_t4 := a_t4*(П_ч4 - И_t4) = 29619
ЧДД_1 := (П_ч1 - И_t1) = -2085.86
ЧДД_2 := (П_ч2 - И_t2) = 27403.9
ЧДД_3 := (П_ч3 - И_t3) = 33343.3
ЧДД_4 := (П_ч4 - И_t4) = 40507.9
П_чср := (П_чt1 + П_чt2 + П_чt3 + П_чt4)/4 = 29393.7
Р_и := П_чср/(И_t1 + И_t2 + И_t3 + И_t4)*100 = 72.2729
